*Heading
File generated by TexGen v3.12.2
************
*** MESH ***
************
*Node
1, -0.5, -0.5, -0.01
2, -0.46, -0.5, -0.01
3, -0.42, -0.5, -0.01
...

...
132649, 1.42, 1.5, 0.21
132650, 1.46, 1.5, 0.21
132651, 1.5, 1.5, 0.21
*Element, Type=C3D8R
1, 2, 53, 52, 1, 2603, 2654, 2653, 2602
2, 3, 54, 53, 2, 2604, 2655, 2654, 2603
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********************
*** ORIENTATIONS ***
********************
** Orientation vectors
** 1st vector represents the fibre direction
** 2nd vector is an arbitrary vector perpendicular to the first
*Distribution Table, Name=TexGenOrientationVectors
COORD3D,COORD3D
*Distribution, Location=Element, Table=TexGenOrientationVectors, Name=TexGenOrientationVectors, Input=_TexGen_base_file.ori
*Orientation, Name=TexGenOrientations, Definition=coordinates
TexGenOrientationVectors
1, 0
********************
*** ELEMENT SETS ***
********************
** TexGen generates a number of element sets:
** All - Contains all elements
** Matrix - Contains all elements belonging to the matrix
** YarnX - Where X represents the yarn index
*ElSet, ElSet=AllElements, Generate
1, 125000, 1
*ElSet, ElSet=Matrix
1, 2, 3, 4, 5, 6, 7, 8, 9, 10, 11, 12, 13, 14, 15, 16
...
124985, 124986, 124987, 124988, 124989, 124990, 124991, 124992, 124993, 124994, 124995, 124996, 124997, 124998, 124999, 125000
*ElSet, ElSet=Yarn0
5587, 5588, 5589, 5637, 5638, 5639, 5687, 5688, 5689, 7937, 7938, 7939, 7986, 7987, 7988, 7989
...
115814, 118062, 118063, 118064, 118112, 118113, 118114, 118162, 118163, 118164
*ElSet, ElSet=Yarn1
6812, 6813, 6814, 6862, 6863, 6864, 6912, 6913, 6914, 9162, 9163, 9164, 9211, 9212, 9213, 9214
...
116991, 117036, 117037, 117038, 117039, 117040, 117087, 117088, 117089, 119337, 119338, 119339, 119387, 119388, 119389, 119437
119438, 119439
*ElSet, ElSet=Yarn2
5562, 5563, 5564, 5612, 5613, 5614, 5662, 5663, 5664, 7961, 7962, 7963, 7964, 7965, 8010, 8011
...
117015, 119312, 119313, 119314, 119362, 119363, 119364, 119412, 119413, 119414
*ElSet, ElSet=Yarn3
6837, 6838, 6839, 6887, 6888, 6889, 6937, 6938, 6939, 9236, 9237, 9238, 9239, 9240, 9285, 9286
...
115738, 115739, 115740, 115741, 115786, 115787, 115788, 115789, 115790, 118087, 118088, 118089, 118137, 118138, 118139, 118187
118188, 118189
*****************
*** NODE SETS ***
*****************
** AllNodes - Node set containing all elements
*NSet, NSet=AllNodes, Generate
1, 132651, 1
*****************
*** MATERIALS ***
*****************
*Material, Name=Mat0
*Elastic
8375.0, 0.31
*Expansion
6.5e-06
*Material, Name=Mat1
*Elastic, type=ENGINEERING CONSTANTS
315116.7, 29356.33, 27712.67, 0.27043670000000003, 0.27251, 0.3720667, 12258.0, 11501.67
11407.67
*Expansion, type=ORTHO
-2e-07, 3e-06, 3e-06
*Solid Section, ElSet=Matrix, Material=Mat0
1.0,
*Solid Section, ElSet=Yarn0, Material=Mat1, Orientation=TexGenOrientations
1.0,
*Solid Section, ElSet=Yarn1, Material=Mat1, Orientation=TexGenOrientations
1.0,
*Solid Section, ElSet=Yarn2, Material=Mat1, Orientation=TexGenOrientations
1.0,
*Solid Section, ElSet=Yarn3, Material=Mat1, Orientation=TexGenOrientations
1.0,
************************************
*** PERIODIC BOUNDARY CONDITIONS ***
************************************
*** ConstraintsDriver0 = e_x
*** ConstraintsDriver1 = e_y
*** ConstraintsDriver2 = e_z
*** ConstraintsDriver3 = e_xy
*** ConstraintsDriver4 = e_xz
*** ConstraintsDriver5 = e_yz
*Node
132652, 0, 0, 0
*NSet, NSet=ConstraintsDriver0
132652
*Node
132653, 0, 0, 0
*NSet, NSet=ConstraintsDriver1
132653
*Node
132654, 0, 0, 0
*NSet, NSet=ConstraintsDriver2
132654
*Node
132655, 0, 0, 0
*NSet, NSet=ConstraintsDriver3
132655
*Node
132656, 0, 0, 0
*NSet, NSet=ConstraintsDriver4
132656
*Node
132657, 0, 0, 0
*NSet, NSet=ConstraintsDriver5
132657
*NSet, NSet=FaceA, Unsorted
2703, 2754, 2805, 2856, 2907, 2958, 3009, 3060, 3111, 3162, 3213, 3264, 3315, 3366, 3417, 3468
...
129183, 129234, 129285, 129336, 129387, 129438, 129489, 129540, 129591, 129642, 129693, 129744, 129795, 129846, 129897, 129948
129999
*NSet, NSet=FaceB, Unsorted
2653, 2704, 2755, 2806, 2857, 2908, 2959, 3010, 3061, 3112, 3163, 3214, 3265, 3316, 3367, 3418
...
129133, 129184, 129235, 129286, 129337, 129388, 129439, 129490, 129541, 129592, 129643, 129694, 129745, 129796, 129847, 129898
129949
*NSet, NSet=FaceC, Unsorted
5153, 5154, 5155, 5156, 5157, 5158, 5159, 5160, 5161, 5162, 5163, 5164, 5165, 5166, 5167, 5168
...
130033, 130034, 130035, 130036, 130037, 130038, 130039, 130040, 130041, 130042, 130043, 130044, 130045, 130046, 130047, 130048
130049
*NSet, NSet=FaceD, Unsorted
2603, 2604, 2605, 2606, 2607, 2608, 2609, 2610, 2611, 2612, 2613, 2614, 2615, 2616, 2617, 2618
...
127483, 127484, 127485, 127486, 127487, 127488, 127489, 127490, 127491, 127492, 127493, 127494, 127495, 127496, 127497, 127498
127499
*NSet, NSet=FaceE, Unsorted
130103, 130104, 130105, 130106, 130107, 130108, 130109, 130110, 130111, 130112, 130113, 130114, 130115, 130116, 130117, 130118
...
132567, 132568, 132569, 132570, 132571, 132572, 132573, 132574, 132575, 132576, 132577, 132578, 132579, 132580, 132581, 132582
132583, 132584, 132585, 132586, 132587, 132588, 132589, 132590, 132591, 132592, 132593, 132594, 132595, 132596, 132597, 132598
132599
*NSet, NSet=FaceF, Unsorted
53, 54, 55, 56, 57, 58, 59, 60, 61, 62, 63, 64, 65, 66, 67, 68
...

2533, 2534, 2535, 2536, 2537, 2538, 2539, 2540, 2541, 2542, 2543, 2544, 2545, 2546, 2547, 2548
2549
*NSet, NSet=Edge1, Unsorted
2602, 5203, 7804, 10405, 13006, 15607
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*NSet, NSet=Edge2, Unsorted
2652, 5253, 7854, 10455, 13056, 15657
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*NSet, NSet=Edge3, Unsorted
5202, 7803, 10404, 13005, 15606, 18207
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*NSet, NSet=Edge4, Unsorted
5152, 7753, 10354, 12955, 15556, 18157
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*NSet, NSet=Edge5, Unsorted
52, 103, 154, 205, 256, 307
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*NSet, NSet=Edge6, Unsorted
102, 153, 204, 255, 306, 357
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*NSet, NSet=Edge7, Unsorted
130152, 130203, 130254, 130305, 130356, 130407
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*NSet, NSet=Edge8, Unsorted
130102, 130153, 130204, 130255, 130306, 130357
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*NSet, NSet=Edge9, Unsorted
2, 3, 4, 5, 6, 7
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*NSet, NSet=Edge10, Unsorted
2552, 2553, 2554, 2555, 2556, 2557
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*NSet, NSet=Edge11, Unsorted
132602, 132603, 132604, 132605, 132606, 132607
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*NSet, NSet=Edge12, Unsorted
130052, 130053, 130054, 130055, 130056, 130057
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*NSet, NSet=MasterNode1, Unsorted
1
*NSet, NSet=MasterNode2, Unsorted
51
*NSet, NSet=MasterNode3, Unsorted
2601
*NSet, NSet=MasterNode4, Unsorted
2551
*NSet, NSet=MasterNode5, Unsorted
130051
*NSet, NSet=MasterNode6, Unsorted
130101
*NSet, NSet=MasterNode7, Unsorted
132651
*NSet, NSet=MasterNode8, Unsorted
132601
***************************
*** BOUNDARY CONDITIONS ***
***************************
*** Name: Translation stop Vertex 1 Type: Displacement/Rotation
*Boundary
MasterNode1, 1, 1
MasterNode1, 2, 2
MasterNode1, 3, 3

*****************
*** EQUATIONS ***
*****************
*Equation
3
FaceA, 1, 1.0, FaceB, 1, -1.0, ConstraintsDriver0, 1, -2
*Equation
2
FaceA, 2, 1.0, FaceB, 2, -1.0
*Equation
2
FaceA, 3, 1.0, FaceB, 3, -1.0
*Equation
3
FaceC, 1, 1.0, FaceD, 1, -1.0, ConstraintsDriver3, 1, -2
*Equation
3
FaceC, 2, 1.0, FaceD, 2, -1.0, ConstraintsDriver1, 1, -2
*Equation
2
FaceC, 3, 1.0, FaceD, 3, -1.0
*Equation
3
FaceE, 1, 1.0, FaceF, 1, -1.0, ConstraintsDriver4, 1, -0.22
*Equation
3
FaceE, 2, 1.0, FaceF, 2, -1.0, ConstraintsDriver5, 1, -0.22
*Equation
3
FaceE, 3, 1.0, FaceF, 3, -1.0, ConstraintsDriver2, 1, -0.22
*Equation
3
Edge2, 1, 1.0, Edge1, 1, -1.0, ConstraintsDriver0, 1, -2
*Equation
2
Edge2, 2, 1.0, Edge1, 2, -1.0
*Equation
2
Edge2, 3, 1.0, Edge1, 3, -1.0
*Equation
4
Edge3, 1, 1.0, Edge1, 1, -1.0, ConstraintsDriver0, 1, -2, ConstraintsDriver3, 1, -2
*Equation
3
Edge3, 2, 1.0, Edge1, 2, -1.0, ConstraintsDriver1, 1, -2
*Equation
2
Edge3, 3, 1.0, Edge1, 3, -1.0
*Equation
3
Edge4, 1, 1.0, Edge1, 1, -1.0, ConstraintsDriver3, 1, -2
*Equation
3
Edge4, 2, 1.0, Edge1, 2, -1.0, ConstraintsDriver1, 1, -2
*Equation
2
Edge4, 3, 1.0, Edge1, 3, -1.0
*Equation
3
Edge6, 1, 1.0, Edge5, 1, -1.0, ConstraintsDriver0, 1, -2
*Equation
2
Edge6, 2, 1.0, Edge5, 2, -1.0
*Equation
2
Edge6, 3, 1.0, Edge5, 3, -1.0
*Equation
4
Edge7, 1, 1.0, Edge5, 1, -1.0, ConstraintsDriver4, 1, -0.22, ConstraintsDriver0, 1, -2
*Equation
3
Edge7, 2, 1.0, Edge5, 2, -1.0, ConstraintsDriver5, 1, -0.22
*Equation
3
Edge7, 3, 1.0, Edge5, 3, -1.0, ConstraintsDriver2, 1, -0.22
*Equation
3
Edge8, 1, 1.0, Edge5, 1, -1.0, ConstraintsDriver4, 1, -0.22
*Equation
3
Edge8, 2, 1.0, Edge5, 2, -1.0, ConstraintsDriver5, 1, -0.22
*Equation
3
Edge8, 3, 1.0, Edge5, 3, -1.0, ConstraintsDriver2, 1, -0.22
*Equation
3
Edge10, 1, 1.0, Edge9, 1, -1.0, ConstraintsDriver3, 1, -2
*Equation
3
Edge10, 2, 1.0, Edge9, 2, -1.0, ConstraintsDriver1, 1, -2
*Equation
2
Edge10, 3, 1.0, Edge9, 3, -1.0
*Equation
4
Edge11, 1, 1.0, Edge9, 1, -1.0, ConstraintsDriver3, 1, -2, ConstraintsDriver4, 1, -0.22
*Equation
4
Edge11, 2, 1.0, Edge9, 2, -1.0, ConstraintsDriver1, 1, -2, ConstraintsDriver5, 1, -0.22
*Equation
3
Edge11, 3, 1.0, Edge9, 3, -1.0, ConstraintsDriver2, 1, -0.22
*Equation
3
Edge12, 1, 1.0, Edge9, 1, -1.0, ConstraintsDriver4, 1, -0.22
*Equation
3
Edge12, 2, 1.0, Edge9, 2, -1.0, ConstraintsDriver5, 1, -0.22
*Equation
3
Edge12, 3, 1.0, Edge9, 3, -1.0, ConstraintsDriver2, 1, -0.22
*Equation
3
MasterNode2, 1, 1.0, MasterNode1, 1, -1.0, ConstraintsDriver0, 1, -2
*Equation
2
MasterNode2, 2, 1.0, MasterNode1, 2, -1.0
*Equation
2
MasterNode2, 3, 1.0, MasterNode1, 3, -1.0
*Equation
4
MasterNode3, 1, 1.0, MasterNode1, 1, -1.0, ConstraintsDriver0, 1, -2, ConstraintsDriver3, 1, -2
*Equation
3
MasterNode3, 2, 1.0, MasterNode1, 2, -1.0, ConstraintsDriver1, 1, -2
*Equation
2
MasterNode3, 3, 1.0, MasterNode1, 3, -1.0
*Equation
3
MasterNode4, 1, 1.0, MasterNode1, 1, -1.0, ConstraintsDriver3, 1, -2
*Equation
3
MasterNode4, 2, 1.0, MasterNode1, 2, -1.0, ConstraintsDriver1, 1, -2
*Equation
2
MasterNode4, 3, 1.0, MasterNode1, 3, -1.0
*Equation
3
MasterNode5, 1, 1.0, MasterNode1, 1, -1.0, ConstraintsDriver4, 1, -0.22
*Equation
3
MasterNode5, 2, 1.0, MasterNode1, 2, -1.0, ConstraintsDriver5, 1, -0.22
*Equation
3
MasterNode5, 3, 1.0, MasterNode1, 3, -1.0, ConstraintsDriver2, 1, -0.22
*Equation
4
MasterNode6, 1, 1.0, MasterNode1, 1, -1.0, ConstraintsDriver4, 1, -0.22, ConstraintsDriver0, 1, -2
*Equation
3
MasterNode6, 2, 1.0, MasterNode1, 2, -1.0, ConstraintsDriver5, 1, -0.22
*Equation
3
MasterNode6, 3, 1.0, MasterNode1, 3, -1.0, ConstraintsDriver2, 1, -0.22
*Equation
5
MasterNode7, 1, 1.0, MasterNode1, 1, -1.0, ConstraintsDriver0, 1, -2, ConstraintsDriver4, 1, -0.22,
ConstraintsDriver3, 1, -2
*Equation
4
MasterNode7, 2, 1.0, MasterNode1, 2, -1.0, ConstraintsDriver1, 1, -2, ConstraintsDriver5, 1, -0.22
*Equation
3
MasterNode7, 3, 1.0, MasterNode1, 3, -1.0, ConstraintsDriver2, 1, -0.22
*Equation
4
MasterNode8, 1, 1.0, MasterNode1, 1, -1.0, ConstraintsDriver3, 1, -2, ConstraintsDriver4, 1, -0.22
*Equation
4
MasterNode8, 2, 1.0, MasterNode1, 2, -1.0, ConstraintsDriver1, 1, -2, ConstraintsDriver5, 1, -0.22
*Equation
3
MasterNode8, 3, 1.0, MasterNode1, 3, -1.0, ConstraintsDriver2, 1, -0.22
*******************
*** CREATE STEP ***
*******************
*** PREDEFINED FIELDS ***
*** Name: Initial temperature 0ºC all cells   Type: Temperature ***
*Initial Conditions, type=TEMPERATURE
AllNodes, 0.

*Step, Name=Isothermal linear perturbation step, perturbation
Elastic material property computation
*Static

***********************
*** OUTPUT REQUESTS ***
***********************
*Output, field
*Element Output, directions=YES
S,
*** FIELD OUTPUT: Output Request Fx ***
*Node Output, nset=ConstraintsDriver0
U,
*** FIELD OUTPUT: Output Request Fy ***
*Node Output, nset=ConstraintsDriver1
U,
*** FIELD OUTPUT: Ouput Request Fz ***
*Node Output, nset=ConstraintsDriver2
U,
*** FIELD OUTPUT: Output Request Shear_xy ***
*Node Output, nset=ConstraintsDriver3
U,
*** FIELD OUTPUT: Output Request Shear_zx ***
*Node Output, nset=ConstraintsDriver4
U,
*** FIELD OUTPUT: Output Request Shear_yz ***
*Node Output, nset=ConstraintsDriver5
U,

******************
*** LOAD CASES ***
******************
*Load Case, name=Load0
*Boundary, op=NEW
MasterNode1, 1, 1
MasterNode1, 2, 2
MasterNode1, 3, 3
*Cload
ConstraintsDriver0, 1, 0.88
*End Load Case

*Load Case, name=Load1
*Boundary, op=NEW
MasterNode1, 1, 1
MasterNode1, 2, 2
MasterNode1, 3, 3
*Cload
ConstraintsDriver1, 1, 0.88
*End Load Case

*Load Case, name=Load2
*Boundary, op=NEW
MasterNode1, 1, 1
MasterNode1, 2, 2
MasterNode1, 3, 3
*Cload
ConstraintsDriver2, 1, 0.88
*End Load Case

*Load Case, name=Load3
*Boundary, op=NEW
MasterNode1, 1, 1
MasterNode1, 2, 2
MasterNode1, 3, 3
*Cload
ConstraintsDriver3, 1, 0.88
*End Load Case

*Load Case, name=Load4
*Boundary, op=NEW
MasterNode1, 1, 1
MasterNode1, 2, 2
MasterNode1, 3, 3
*Cload
ConstraintsDriver4, 1, 0.88
*End Load Case

*Load Case, name=Load5
*Boundary, op=NEW
MasterNode1, 1, 1
MasterNode1, 2, 2
MasterNode1, 3, 3
*Cload
ConstraintsDriver5, 1, 0.88
*End Load Case


*End Step

*** STEP: Thermomechanical step ***
*Step, name=Thermomechanical step, perturbation
Coefficient of Thermal Expansion computation
*Static
*** PREDEFINED FIELDS ***
*** Name: Temperature steady 1ºC all cells   Type: Temperature ***
*Temperature
AllNodes, 1.
***********************
*** OUTPUT REQUESTS ***
***********************
*Output, field
*Element Output, directions=YES
S,
*** FIELD OUTPUT: Output Request Fx ***
*Node Output, nset=ConstraintsDriver0
U,
*** FIELD OUTPUT: Output Request Fy ***
*Node Output, nset=ConstraintsDriver1
U,
*** FIELD OUTPUT: Output Request Fz ***
*Node Output, nset=ConstraintsDriver2
U,
*End Step
